# Worksheet setting: ORIGIN = 1
# Zadanie č. 2 – 1. časť: Práca so softvérom MathCAD
# Meno študenta: Adam Molnar  Predmet: Programovanie 1  Šk. rok 2026/2027
# 2. Zápis matematických vzťahov
v1 := 5 + 3*2 - 4 + 1.5
v1 = 8.5
v2 := 18/4
v2 = 4.5
v3 := sqrt(144) - 3^2
v3 = 3
v4 := (7 - 2)^3/25
v4 = 5
v5 := sqrt(2^4 + 3^2)*1.5
v5 = 7.5
v6 := (2^5 + sqrt(81))/4 - 2.5*3
v6 = 2.75
# 3. Globálne definovanie konštánt a premenných
R ≡ 6381  # Polomer Zeme
ρ ≡ π/200  # Konštanta na prevod grádov na radiány
R = 6381
ρ = 0.015708
a := 12.5
a = 12.5
b := 3.75
b = 3.75
c := -4.2
c = -4.2
dd := 0.85
dd = 0.85
h := 2.4
h = 2.4
x1 := 1.6
x1 = 1.6
x2 := -2.3
x2 = -2.3
# 4. Definovanie postupnosti
x := -5, -4 .. 4
y := 10, 15 .. 100
x = [-5; -4; -3; -2; -1; 0; 1; 2; 3; 4]
y = [10; 15; 20; 25; 30; 35; 40; 45; 50; 55; 60; 65; 70; 75; 80; 85; 90; 95; 100]
# 5. Vstavané premenné
ORIGIN := 1
ORIGIN = 1
TOL := 0.00015
TOL = 0.00015
PRNCOLWIDTH := 11
PRNCOLWIDTH = 11
PRNPRECISION := 6
PRNPRECISION = 6
# Nastavenie: hodnoty sa dajú zadať priamo v dokumente cez := (ako vyššie) alebo pre celý dokument cez kartu Calculation > Worksheet Settings (Array Origin, Convergence Tolerance, PRN File Settings).
# ORIGIN – index prvého prvku poľa (vektora, matice); predvolene 0, tu 1.
# TOL – presnosť (tolerancia) numerických výpočtov, napr. riešenia rovníc, integrálov, limít.
# PRNCOLWIDTH – šírka stĺpca (počet znakov) pri zápise dát do súboru .prn funkciou WRITEPRN.
# PRNPRECISION – počet platných číslic pri zápise dát do súboru .prn.
# 6. Výpočty v prostredí MathCAD
# a) Vstavané funkcie
exp(x1) = 4.95303
exp(c) = 0.0149956
log(a) = 1.09691
log(dd) = -0.0705811
ln(h) = 0.875469
ln(dd) = -0.162519
floor(b) = 3
floor(c) = -5
ceil(b) = 4
ceil(c) = -4
trunc(x1) = 1
trunc(x2) = -2
round(b) = 4
round(x2) = -2
mod(a, b) = 1.25
mod(c, 1.5) = -1.2
# b) Výpočty v trojuholníku a definovanie vlastnej funkcie
# Trojuholník 1 – dané dĺžky strán (bez jednotiek):
a1 := 45.32
b1 := 38.17
c1 := 52.64
vypocet_uhla(p, q, r) := acos((q^2 + r^2 - p^2)/(2*q*r))
α1 := vypocet_uhla(a1, b1, c1)/ρ
α1 = 63.6094
β1 := vypocet_uhla(b1, a1, c1)/ρ
β1 = 50.111
γ1 := vypocet_uhla(c1, a1, b1)/ρ
γ1 = 86.2796
α1 + β1 + γ1 = 200
s1 := (a1 + b1 + c1)/2
s1 = 68.065
S1 := sqrt(s1*(s1 - a1)*(s1 - b1)*(s1 - c1))
S1 = 844.922  # m²
# Trojuholník 2 – dané uhly v grádoch a strana c2:
α2 := 58.4321
β2 := 72.1854
c2 := 125.48*m
γ2 := 200 - α2 - β2
γ2 = 69.3825  # g
a2 := c2*sin(α2*ρ)/sin(γ2*ρ)
a2 = 112.421 m
b2 := c2*sin(β2*ρ)/sin(γ2*ρ)
b2 = 128.24 m
S2 := 1/2*a2*b2*sin(γ2*ρ)
S2 = 6390.75 m^2
γ2d := γ2*0.9
γ2d = 62.4443
stupne := floor(γ2d)
stupne = 62
minuty := floor((γ2d - stupne)*60)
minuty = 26
sekundy := ((γ2d - stupne)*60 - minuty)*60
sekundy = 39.3
